# Energy conservation check (NVE) for a potential and timestep.
variable pot index alnb
variable dt  index 0.002
variable T   index 950
if "${pot} == alnb" then "variable a0 equal 4.0447" else "variable a0 equal 4.05"
units metal
atom_style atomic
boundary p p p
lattice fcc ${a0}
region box block 0 8 0 8 0 8
create_box 1 box
create_atoms 1 box
mass 1 26.982
include pot_${pot}.lmp
timestep ${dt}
velocity all create $(2*v_T) 12345 mom yes rot yes dist gaussian
fix 1 all nve
thermo_style custom step time temp etotal
thermo_modify format float %.6f
thermo $(round(1.0/v_dt))
run $(round(20.0/v_dt))
